x1 := [1; 1; 0; 0]
y := [1; 1; 1; 1]
w := [0; 0; 0; 0; 0; 0; 0; 0; 0; 0]
f(x) := 1/(1 + e^(-x))
x2 := [0; 1; 1; 0]
res(k, x1, x2) := f(f(f(k[0]*x1 + k[2]*x2)*k[4] + k[5])*k[8] + f(f(k[1]*x1 + k[3]*x2)*k[6] + k[7])*k[9])
err(t) := 1/8*sum((res(t, x1[i], x2[i]) - y[i])^2, i = 0 .. 3)
n := 0.3
∇[w](err(w)) = [0; 0; 0; 0; 0; 0; 0; 0; -0.0625; -0.0625]
w :=
    z ← w
    while err(z) ≥ 0.0001
        dw ← ∇[z](err(z))
        i ← 0
        while i ≤ 9
            z[i] ← z[i] - dw[i]*n
            i ← i + 1
    z
err(w) = 9.99911e-5
res(w, x1, x2) = [0.985859; 0.985921; 0.985859; 0.985796]
w = [0.0382729; 0.0382729; 0.0382729; 0.0382729; 0.557033; 1.10704; 0.557033; 1.10704; 2.65033; 2.65033]
